<?xml version="1.0" encoding="UTF-8" standalone="yes"?>
<Lems xmlns="http://www.neuroml.org/lems/0.9.0">

  <!--

   LEMS definition of a simple pendulum.

  -->

  <ComponentType name="SimplePendulum"
				 description="Equations of motion for a simple pendulum with mass _m_ and length _l_ ">

    <Parameter name="m" dimension="mass" description="Mass of the bob"/>
    <Parameter name="l" dimension="length" description="Length of the limb"/>
    <Parameter name="g" dimension="acceleration" description="Gravitational acceleration"/>

    <!-- Initial Conditions -->
    <Parameter name="theta_0" dimension="none"/>
    <Parameter name="p_0" dimension="angular_momentum"/>

    <Exposure name="theta" dimension="none"/>
    <Exposure name="p" dimension="angular_momentum"/>

    <Dynamics>

      <StateVariable name="theta" dimension="none" exposure="theta"/>
      <StateVariable name="p" dimension="angular_momentum" exposure="p"/>

      <TimeDerivative variable="theta" value="p / (2*m*l*l)"/>
      <TimeDerivative variable="p" value="-m*g*l*sin(theta)"/>

      <OnStart>
        <StateAssignment variable="theta" value="theta_0"/>
        <StateAssignment variable="p" value="p_0"/>
      </OnStart>

    </Dynamics>

  </ComponentType>

  <!-- ############################################################## -->

  <!-- Specify which component to run -->
  <Target component="sim1"/>

  <Component type="SimplePendulum" id="pend" l="1e-3km" m="1kg" g="1m_per_s2"
			 theta_0="1.0"  p_0="0kg_m2_per_s"/>

  <Component type="Simulation" id="sim1" length="100s" step="0.001s" target="pend" method="rk4">

    <Component type="Display" id="d1" title="theta timeseries"
			   timeScale="1s" xmin="0" xmax="100" ymin="-10" ymax="10">
      <Component type="Line" id ="th" quantity="theta" scale="1" color="#ff0000" timeScale="1s"/>
    </Component>

    <Component type="Display" id="d2" title="p timeseries"
			   timeScale="1s" xmin="0" xmax="100" ymin="-10" ymax="10">
      <Component type="Line" id ="p" quantity="p" scale="1" color="#0000ff" timeScale="1s"/>
    </Component>

	<!--
		<Component type="OutputFile" id="out" fileName="pend.dat">
        <OutputColumn id="th" quantity="theta"/>
        <OutputColumn id="p" quantity="p"/>
		</Component>
	-->

  </Component>

  <!-- ############################################################## -->

  <Dimension name="time" t="1"/>
  <Dimension name="length" l="1"/>
  <Dimension name="mass" m="1"/>
  <Dimension name="acceleration" l="1" t="-2"/>
  <Dimension name="angular_momentum" l="2" t="-1" m="1"/>
  <Dimension name="angular_mass" l="2" m="1"/>
  <Dimension name="per_time" t="-1"/>

  <Unit symbol="s" dimension="time"/>
  <Unit symbol="per_s" dimension="per_time"/>
  <Unit symbol="m" dimension="length"/>
  <Unit symbol="km" dimension="length" power="3"/>
  <Unit symbol="kg" dimension="mass"/>
  <Unit symbol="m_per_s2" dimension="acceleration"/>
  <Unit symbol="kg_m2_per_s" dimension="angular_momentum"/>
  <Unit symbol="kg_m2" dimension="angular_mass"/>

  <!-- ############################################################## -->

  <ComponentType name="Display">
    <Text name="title"/>
	<Parameter name="xmin" dimension="none"/>
	<Parameter name="xmax" dimension="none"/>
	<Parameter name="ymin" dimension="none"/>
	<Parameter name="ymax" dimension="none"/>

	<Parameter name="timeScale" dimension="time"/>
    <Children name="lines" type="Line"/>

    <Simulation>
      <DataDisplay title="title" dataRegion="xmin,xmax,ymin,ymax"/>
    </Simulation>
  </ComponentType>

  <ComponentType name="Line">
    <Parameter name="scale" dimension="*"/>
	<Parameter name="timeScale" dimension="*"/>
    <Text name="color"/>
    <Path name="quantity"/>
    <Simulation>
      <Record quantity="quantity" timeScale="timeScale" scale="scale" color="color"/>
    </Simulation>
  </ComponentType>

  <ComponentType name="OutputFile">
	<Text name="path"/>
	<Text name="fileName"/>

	<Children name="outputColumn" type="OutputColumn"/>

	<Simulation>
	  <DataWriter path="path" fileName="fileName"/>
	</Simulation>

  </ComponentType>

  <ComponentType name="OutputColumn">
    <Path name="quantity"/>
	<Simulation>
      <Record quantity="quantity"/>
    </Simulation>
  </ComponentType>

  <ComponentType name="Simulation">
    <Parameter name="length" dimension="time"/>
    <Parameter name="step" dimension="time"/>

    <ComponentReference name="target" type="Component"/>

    <Children name="displays" type="Display"/>

    <Children name="outputs" type="OutputFile"/>

    <Dynamics>
      <StateVariable name="t" dimension="time"/>
    </Dynamics>

    <Simulation>
      <Run component="target" variable="t" increment="step" total="length"/>
    </Simulation>
  </ComponentType>

</Lems>
